// COMSOL Multiphysics 5.6.0.401 model "EP2Dnew.mph"
// Outline of the model tree

Parameters
  V0 = 1081[V]  // Applied Voltage
  E_thres = 700[V/cm]  // IRE Threshold
  Tmr_rad = 4[mm]  // Tumor radius (XY)
  Tmr_x0 = 0[mm]  // Tumor Coordinate (X)
  Tmr_y0 = 0[mm]  // Tumor Coordinate (Y)
  RadN = 1.6[mm]  // Central Elec Radius
  RadP = 0.3[mm]  // Other Elec Radius
  Tmr_E_Hlt = 0.411[S/m]  // Tumor ECond before ablation
  Tmr_E_Abl = Tmr_E_Abl_Fac*Tmr_E_Hlt  // Tumor ECond after ablation
  Lvr_E_Hlt = 0.075[S/m]  // Liver ECond before ablation
  Lvr_E_Abl = Lvr_E_Abl_Fac*Lvr_E_Hlt  // Liver ECond after ablation
  E_mdl_TZ = 30000
  E_mdl_C = 55000
  Tmr_E_Abl_Fac = 1.2826
  Lvr_E_Abl_Fac = 3.3684
  Lvr_rad = 100[mm]

Functions
  step2: Step "tissue" | funcname = tissue; location = E_mdl_C; from = Lvr_E_Hlt; to = Lvr_E_Abl; smooth = E_mdl_TZ
  step3: Step "tumor" | funcname = tumor; location = E_mdl_C; from = Tmr_E_Hlt; to = Tmr_E_Abl; smooth = E_mdl_TZ

Variables
  var1 "Variables 1"
    TVol = 4*intop1(((x-Tmr_x0)^2+(y-Tmr_y0)^2)<=(Tmr_rad)^2)  // Tumor Volume
    TAbl = PAbl + 4*intop1((ec.normE >= E_thres) && ((x-Tmr_x0)^2+(y-Tmr_y0)^2)<=(Tmr_rad)^2)  // Tumor Ablated
    AZne = EVol + 4*intop1(ec.normE >= E_thres)  // Ablated Zone
    RelTA = TAbl/TVol*100  // Relative tumor Ablation
    HtAbl = AZne - TAbl  // Healthy tissue ablation
    TuAbl = 4*intop1((ec.normE < E_thres) && (root.material.sigma_iso < 1) && ((x-Tmr_x0)^2+(y-Tmr_y0)^2)<=(Tmr_rad)^2)  // Unablated tumor Volume
    EVol = 4*pi*RadP*RadP+ pi*RadN*RadN  // Electrode Volume
    PAbl = 4*intop1((((x-Tmr_x0)^2+(y-Tmr_y0)^2)<=(Tmr_rad)^2) && (root.material.sigma_iso > 5e7))  // Piercing tumor Ablation
    EVol2 = 4*intop1(root.material.sigma_iso > 5e7)  // Electrode Volume Check

Couplings
  intop1: Integration on all domains

Geometry
  geom1 "Geometry 1" (2D, length unit mm)
    c1: Circle | r = Lvr_rad
    c7: Circle | r = 13
    c2: Circle | pos = {Tmr_x0, 0}; r = Tmr_rad
    c3: Circle | r = RadN
    c4: Circle | pos = {7.8+RadP, 0}; r = RadP
    c5: Circle | pos = {-7.8-RadP, 0}; r = RadP
    c6: Circle | pos = {0, 7.8+RadP}; r = RadP
    pard1: PartitionDomains
      domain = c1(1) domains 1; c7(1) domains 1; c2(1) domains 1; c3(1) domains 1; c5(1) domains 1; c4(1) domains 1
      vertexsegment = c1(1) points 1, 3
    del1: Delete "Delete Entities 1"
      input = pard1(1) domains 2; pard1(2) domains 2; pard1(3) domains 2; pard1(4) domains 2; pard1(5) domains 2; pard1(6) domains 2
    pt1: Point
    pard2: PartitionDomains
      domain = del1(1) domains 1; del1(2) domains 1; del1(3) domains 1; del1(4) domains 1; c6(1) domains 1
      vertexsegment = del1(1) points 2; pt1(1) points 1
      vertexline = del1(1) points 2
    del2: Delete "Delete Entities 2"
      input = pard2(1) domains 2; pard2(2) domains 2; pard2(3) domains 2; pard2(4) domains 2; pard2(5) domains 1; del1(6) domains 1
    fin: Finalize "Form Union"

Materials
  mat1: Common "Liver (human)" on all domains
    def "Basic"
      heatcapacity = 3540[J/(kg*K)]
      density = 1079[kg/m^3]
      thermalconductivity = 0.52[W/(m*K)]
      frequencyfactor = 7.39e39
      activationenergy = 2.577e5
      relpermittivity = 15056000
      electricconductivity = tissue(ec.normE)
  mat2: Common "Copper" on domains 3, 5, 6
    def "Basic"
      relpermeability = 1
      electricconductivity = 5.998e7[S/m]
      heatcapacity = 385[J/(kg*K)]
      relpermittivity = 1
      emissivity = 0.5
      density = 8940[kg/m^3]
      thermalconductivity = 400[W/(m*K)]
    Enu "Young's modulus and Poisson's ratio"
      youngsmodulus = 126e9[Pa]
      poissonsratio = 0.34
    linzRes "Linearized resistivity"
      rho0 = 1.667e-8[ohm*m]
      alpha = 3.862e-3[1/K]
      Tref = 293.15[K]
  mat3: Common "tumor" on domains 4
    def "Basic"
      heatcapacity = 3540[J/(kg*K)]
      density = 1079[kg/m^3]
      thermalconductivity = 0.52[W/(m*K)]
      frequencyfactor = 7.39e39
      activationenergy = 2.577e5
      relpermittivity = 15056000
      electricconductivity = tumor(ec.normE)

Physics
  ec: ConductiveMedia "Electric Currents" on all domains
    dependent variable V
    cucn1: CurrentConservation (default)
    ein1: ElectricInsulation (default)
    init1: init "Initial Values 1" (default)
    term2: DomainTerminal "Terminal 2" on domains 5 | TerminalType = Voltage; V0 = 0
    term3: DomainTerminal "Terminal 3" on domains 3, 6 | TerminalType = Voltage; V0 = V0

Mesh
  mesh5 "Mesh 5"
    size: MeshSizeDefault | hmin = 1.6; hauto = 8
    size1: Size on boundaries 15-20
    ftri1: FreeTri "Free Triangular 1" on remaining entities
      size2: Size on domains 2, 4 | hmax = 1.2; hgrad = 1.5; hauto = 7; custom = on; hnarrow = 0.1
    ada1: Adapt on domains 2, 4 | solution = none; exprtype = size; method = regular; maxrefinement = 2; sizeexpr = 1e-25

Studies
  std5 "FinalMeshStudy"
    stat: Stationary

Solver configurations
  sol28 "Solution 28" (study std5)
    v1: Variables "Dependent Variables 1"
    s1: Stationary "Stationary Solver 1"
      dDef: Direct
      fc1: FullyCoupled | linsolver = dDef

Datasets
  dset9: Solution | solution = sol28

Evaluation groups
  eg1: EvaluationGroup | data = dset9
    gev1: EvalGlobal "Global Evaluation 1"
      expr = {TVol, TAbl, AZne, RelTA, HtAbl, TuAbl, EVol, PAbl, EVol2}
      unit = {cm^2, cm^2, cm^2, 1, cm^2, cm^2, cm^2, cm^2, cm^2}
      descr = {Tumor Volume, Tumor Ablated, Ablated Zone, Relative tumor Ablation, Healthy tissue ablation, Unablated tumor Volume, Electrode Volume, Piercing tumor Ablation, Electrode Volume Check}

Plots
  pg32: PlotGroup2D "Electric Potential (ec)" | data = dset9
    surf1: Surface | expr = V
    mesh1: Mesh (disabled)
  pg33: PlotGroup2D "Electric Field (ec)" | data = dset9
    surf1: Surface | expr = ec.normE
    con1: Contour (disabled) | expr = ec.normE
    mesh1: Mesh (disabled)
  pg34: PlotGroup2D "Electric Conductivity" | data = dset9
    surf1: Surface | expr = ec.sigmaxx
    mesh1: Mesh (disabled)